// SBML level 2 version 4

model New_Model()

  // Compartments:
  compartment Intracellular = 1;

  // Species:
  species Glucose in Intracellular = 16;
  species Oxygen in Intracellular = 15;
  species Energy in Intracellular = 0;
  species Lactate in Intracellular = 0;
  species Glutamine in Intracellular = 3;

  // Parameters:
  k_aer = 0.005;
  k_ane = 0.001;
  k_usage = 0.05;
  k_glut = 0.0002;

  // Reactions:
  Aerobic: Glucose + Oxygen => 38 Energy; Intracellular*k_aer*Glucose*Oxygen;
  Anaerobic: Glucose => 4 Energy + Lactate; Intracellular*k_ane*Glucose;
  Energy_Usage: Energy => ; Intracellular*k_usage*Energy;
  Glutamine_Energy: Glutamine => Energy; Intracellular*k_glut*Glutamine;

  // Unit definitions:
  unit length = 1e-6 metre;
  unit area = (1e-6 metre)^2;
  unit volume = 1e-3 litre;
  unit time = 60 second;
  unit substance = 1e-3 mole;
end
